// SBML level 2 version 4

function Constant_flux__irreversible(v)
  v;
end
Constant_flux__irreversible is "Constant flux (irreversible)";

model geneExpressionCopasi()

  // Compartments:
  compartment cyt = 1;

  // Species:
  species DNA_off in cyt = 1;
  species DNA_on in cyt = 1;
  species mRNA in cyt = 1;
  species Protein in cyt = 1;

  // Parameters:
  tau_on = 0.2;
  k_m = 10;
  gamma_m = 1;
  k_p = 4;
  tau_on_p = 0.015;
  gamma_p = 1;
  tau_off = 0.2;

  // Reactions:
  reaction_1: DNA_off => DNA_on; cyt*tau_on*DNA_off;
  reaction_2: DNA_on => DNA_off; cyt*tau_off*DNA_on;
  reaction_3: => mRNA; cyt*Constant_flux__irreversible(k_m);
  reaction_4: mRNA => ; cyt*gamma_m*mRNA;
  reaction_5: mRNA => mRNA + Protein; cyt*k_p*mRNA;
  reaction_6: Protein => ; cyt*gamma_p*Protein;
  reaction_7: Protein + DNA_off => Protein + DNA_on; cyt*tau_on_p*Protein*DNA_off;

  // Unit definitions:
  unit volume = metre^3;
  unit substance = item;
end
