// SBML level 2 version 4

model New_Model()

  // Compartments:
  compartment cyt = 1;

  // Species:
  substanceOnly species DNA_off in cyt = 1;
  substanceOnly species DNA_on in cyt = 0;
  substanceOnly species mRNA in cyt = 4;
  substanceOnly species Protein in cyt = 10;

  // Parameters:
  tau_off = 0.2;
  tau_on = 0.2;
  k_m = 10;
  gamma_m = 1;
  k_p = 4;
  gamma_p = 1;
  tau_on_p = 0.015;

  // Reactions:
  R1: DNA_off => DNA_on; tau_on_p*DNA_off;
  R2: DNA_on => DNA_off; tau_off*DNA_on;
  R3: DNA_on => mRNA + DNA_on; k_m*DNA_on;
  R4: mRNA => ; gamma_m*mRNA;
  R5: mRNA => mRNA + Protein; k_p*mRNA;
  R6: Protein => ; gamma_p*Protein;
  R7: DNA_off + Protein => DNA_on + Protein; tau_on_p*DNA_off*(Protein/cyt);

  // Unit definitions:
  unit volume = 1e-3 litre;
  unit substance = 1e-3 mole;
end
